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/batch
! ANSYS input file written by Workbench version 2023 R2
/assign,rstp,file,rst              ! Force Eigen analysis to write to file.rst because WB expects it
/com,*********** Resuming The ANSYS db File from Modal Solution ***********
resume,file,db
/title,Vibration_Fatigue3--Transient (C5)
/COM,/COM,     AnsysForcedResponse, 2022.2
/COM,/COM,     ANSYSMotion, 2023.2
/prep7
/com,*********** Defining Loadings ***********
RP_1 = 199      ! Set Remote Point Node ID to User Specified Name
/com,*********** Create Remote Point "RP_I1 - PORT REAR MOUNT (CS-8013) 3" ***********
! -------- Remote Point Used by "Moment" --------
n,205,3.012500107e+02,5.000000075e+01,-4.499999993e+01
*set,tid,5
*set,cid,4
et,cid,174
et,tid,170
keyo,tid,2,1               ! Don't fix the pilot node
keyo,tid,4,111111
keyo,cid,12,5              ! Bonded Contact
keyo,cid,4,1               ! Deformable RBE3 style load
keyo,cid,2,2               ! MPC style contact
eblock,10,,,10
(15i9)
      279        4        4        4        0      143      139      149      150
      280        4        4        4        0      144      140      139      143
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-1
*set,_npilot,205
_npilot550=_npilot
type,tid
mat ,cid
real,cid
tshape,pilo
en,289,_npilot
tshape
RP_1 = 205      ! Set Remote Point Node ID to User Specified Name
/com,*********** Construct Moment Using Remote Attachment ***********

*DIM,_loadvari112x,TABLE,4,1,1,TIME
! Time values
*TAXIS,_loadvari112x(1),1,0.,11.727,22.727,99.727
! Load values
_loadvari112x(1,1,1) = 7.
_loadvari112x(2,1,1) = 11.
_loadvari112x(3,1,1) = 33.
_loadvari112x(4,1,1) = 55.


*DIM,_loadvari112y,TABLE,4,1,1,TIME
! Time values
*TAXIS,_loadvari112y(1),1,0.,11.727,22.727,99.727
! Load values
_loadvari112y(1,1,1) = 0.
_loadvari112y(2,1,1) = 0.
_loadvari112y(3,1,1) = 0.
_loadvari112y(4,1,1) = 0.


*DIM,_loadvari112z,TABLE,4,1,1,TIME
! Time values
*TAXIS,_loadvari112z(1),1,0.,11.727,22.727,99.727
! Load values
_loadvari112z(1,1,1) = 0.
_loadvari112z(2,1,1) = 0.
_loadvari112z(3,1,1) = 0.
_loadvari112z(4,1,1) = 0.


fini
/fcomp,rst,sparse		!	Result files compression using sparsification
/com,*********** Performing Modal Re-start ***********
/solu
antype,modal,restart    ! restarting the modal analysis
dmpoption,rst,no              ! Don't combine result files for DANSYS
dmpopt,esav,no
dmpopt,emat,no
dmpopt,mode,no
dmpopt,full,no
dmpopt,mlv,no
modcontrol,on
thexpand,off     ! ignore thermal strains
mxpand,,,,yes,,no,  ! expand element results, but not write them to file.mode
outres,erase
outres,all,none
outres,strs,all
fdele,all,all
sfdele,all,all
sfedele,all,all,all
acel,0,0,0                 ! zero out the acceleration
/com,*********** Setting and Solving Each Load Step ***********
nsel,s,node,,205
f,all,mx,1
nsel,all
solve
/com,**********************
/com *************** Write FE CONNECTORS *********
CEWRITE,file,ce,,INTE
fini
/com,****************************************************************************
/com,*******************    MSUP TRANSIENT SOLUTION      ************************
/com,****************************************************************************
/solu
antype,4                   ! transient analysis
trnopt,msup,,,,,,,,,yes                ! MSUP Transient analysis
kbc,1                      ! stepped BC's since transient analysis
_thickRatio=  0     ! Ratio of thick parts in the model
eqsl,sparse,,,,,1
outres,nsol,all
dmprat,2.e-002      ! Constant Damping Ratio
tintp,5.e-003       ! Numerical Damping
autots,off                 ! Always constant time stepping for MSUP Transient
deltim,1.5e-004
time,0
fdele,all,all
sfdele,all,all
sfedele,all,all,all
acel,0,0,0                 ! zero out the acceleration
! Dummy out LVSCALE command in order to set array size
lvscale,0,1
solve
time,6.
fdele,all,all
sfdele,all,all
sfedele,all,all,all
acel,0,0,0                 ! zero out the acceleration
/com,*********** Scaling Each Load Step for MSUP Solve ***********
lvscale,%_loadvari112x%,1
outres,erase
outres,all,none
outres,nsol,all
solve
/com,****************************************************
/com,*************** FINISHED SOLVE FOR LS 1 *************
fini
save,file,db
*get,_NSOLTHREADS,active,0,ntfs
*get,_NSOLPROCESSES,active,0,npfs
/post1
fini
